// COMSOL Multiphysics 6.1.0.252 model "ZnCl2_Parametric_theta2.mph"
// Outline of the model tree

Parameters
  K = 1.8
  TAU = 0.0005
  EPS = 0.01
  DELTA = 0.04
  ANGLE0 = 0.785
  ANISO = 6
  ALPHA = 0.9
  GAMMA = 10.0
  TEQ = 1.0

Functions
  step1: Step "阶跃 1" | location = 0.05; from = 1; to = 0

Variables
  var1 "变量 1"
    angle = if(abs(thetax)>eps,atan2(thetay,thetax)+pi*(atan2(thetay,thetax)<0),pi/2*((thetay>0)+3*(thetay<0)))
    epsilon2 = epsilon*epsilon
    epsilonp = -EPS*ANISO*DELTA*sin(ANISO*(angle-ANGLE0))
    epsilon = EPS*(1+DELTA*cos(ANISO*(angle-ANGLE0)))
    m = ALPHA/pi*atan(GAMMA* (TEQ-T))

Geometry
  geom1 "几何 1" (2D, length unit m)
    r1: Rectangle "矩形 1" | base = center; size = {12, 12}
    fin: Finalize "形成联合体"

Physics
  g: GeneralFormPDE "一般形式偏微分方程" on all domains
    dependent variable u = {theta, T}
    EquationForm.form = Automatic
    gfeq1: GeneralFormPDE "一般形式偏微分方程 1" (default)
      f = {-d(epsilon2,x)*thetax-d(epsilon2,y)*thetay+theta*(1-theta)*(theta-0.5+m), 0}
      Ga = 
        {-thetax*epsilon2+epsilon*epsilonp*thetay, -thetay*epsilon2-epsilon*epsilonp*thetax}
        {-Tx, -Ty}
      da = {TAU, -K, 0, 1}
    zflx1: ZeroFluxBoundary "零通量 1" (default)
    init1: init "初始值 1" (default) | theta = step1(x^2+y^2)

Mesh
  mesh1 "网格 1"
    size: MeshSizeDefault "大小" | hmax = 0.1; hmin = 6.75e-4; hcurve = 0.25; hgrad = 1.2; custom = on
    map1: Map "映射 1" on remaining entities

Studies
  std1 "研究 1"
    time: Transient "瞬态" | tlist = range(0,0.05,1)

Solver configurations
  sol1 "解 1" (study std1)
    v1: Variables "因变量 1"
    t1: Time "瞬态求解器 1" | tlist = range(0,0.05,1)
      dDef: Direct "直接"
      fc1: FullyCoupled "全耦合 1" | linsolver = dDef

Datasets
  dset1: Solution | solution = sol1

Plots
  pg1: PlotGroup2D "一般形式偏微分方程" | data = dset1
    surf1: Surface "表面 1" | expr = theta